// COMSOL Multiphysics 5.4.0.346 model "complex_cond.mph"
// Outline of the model tree

Geometry
  geom1 "Geometry 1" (2D, length unit m)
    sq1: Square | base = center
    c4: Circle | r = 0.2
    fin: Finalize "Form Union"

Physics
  ec: ConductiveMedia "Electric Currents" on all domains
    dependent variable V
    cucn1: CurrentConservation (default) | sigma_mat = userdef; sigma = 1+x
    ein1: ElectricInsulation (default)
    init1: init "Initial Values 1" (default)
    cucn4: CurrentConservation on domains 2 | sigma_mat = userdef; sigma = 1+y
    gnd2: Ground on boundaries 1-4
    bcs3: BoundaryCurrentSource on boundaries 5-8 | Qjs = 1

Mesh
  mesh1 "Mesh 1" (physics-controlled)

Studies
  std1 "Study 1"
    stat: Stationary

Solver configurations
  sol1 "Solution 1" (study std1)
    v1: Variables "Dependent Variables 1"
    s1: Stationary "Stationary Solver 1"
      dDef: Direct
      fc1: FullyCoupled | linsolver = dDef

Datasets
  dset1: Solution | solution = sol1
  cln1: CutLine2D | data = dset1; genpoints = {{0.1, 0}, {1, 0}}

Plots
  pg1: PlotGroup2D "Electric Potential (ec)" | data = dset1
    surf1: Surface | expr = V

Exports
  data1: Data
    data = dset1
    expr = V
    unit = V
    descr = Electric potential
    filename = /home/jlewislabo/Documents/pyFishFem/tests/data/complex_cond.txt