// COMSOL Multiphysics 5.4.0.346 model "fish.mph"
// Reference
// Outline of the model tree

Parameters
  head_distance = 0.6*fish_length
  tail_distance = 0.9*fish_length
  tank_size = 70[cm]
  fish_length = 0.212209863[m]
  organ_offset = 19[cm]
  head_cond = 0.00025
  tail_cond = 0.0025
  eod_frac = 0.24
  plexiglass = 1e-10[S/m]
  open_circuit = 1e-6[S/m]
  high_resistance = 75[kohm]
  low_resistance = 1[kohm]
  high_resistance_s = 1/(high_resistance*1.5[cm])
  low_resistance_s = 1/(low_resistance*1.5[cm])
  center_resistance = low_resistance
  side_resistance = high_resistance
  center_resistance_s = 1/(center_resistance*1.5[cm])
  side_resistance_s = 1/(side_resistance*1.5[cm])

Functions
  pw2: Piecewise (disabled)
    smooth = contd1
    pieces = 
      {0, head_distance, head_cond}
      {head_distance, tail_distance, head_cond+((tail_cond-head_cond)/(tail_distance-head_distance))*(x-head_distance)}
      {tail_distance, 0.3, tail_cond}
  step1: Step | from = -1; smooth = 0.00001; ncontder = 1
  int1: Interpolation | importedname = interpolated.txt; funcs = {current, 1}; source = file; filename = E:\files\Analysis of Model\interpolated.txt; nargs = 2; argunit = m,1; fununit = A/m^2

Variables
  var1 "Variables 1"
    body_cond = 0.35582
    middle_cond = head_cond+((tail_cond-head_cond)/(tail_distance-head_distance))*(x-head_distance)
    gnd_cond = 7.27e4
    ref_cond = 3.333e-4
    water_cond = 0.023
    organ_cond = 0.92717
    cond = ((x<head_distance)*head_cond)+((x>head_distance&&x<tail_distance)*middle_cond)+((x>tail_distance)*tail_cond)
    gaus1x = exp(-((x-x1x)^2)/(2*Dx^2))
    voltagex = Ax*gaus1x+Bx*gaus2x+Cx*gaus3x
    gaus1 = exp(-((x-x1)^2)/(2*B1^2))
    gaus2 = exp(-((x-x2)^2)/(2*B2^2))
    gaus3 = exp(-((x-x3)^2)/(2*B3^2))
    gaus4 = exp(-((x-x4)^2)/(2*B4^2))
    gaus5 = exp(-((x-x5)^2)/(2*B5^2))
    gaus6 = exp(-((x-x6)^2)/(2*B6^2))
    gaus7 = exp(-((x-x7)^2)/(2*B7^2))
    gaus8 = exp(-((x-x8)^2)/(2*B8^2))
    current = A1*gaus1+A2*gaus2+A3*gaus3+A4*gaus4+A5*gaus5+A6*gaus6+A7*gaus7+A8*gaus8

Selections
  sel1: Explicit "Outer Skin" on boundaries 5, 9, 13, 17, 21, 25, 32, 36, 40, 46, 50, 54, 56, 62, 66, 70, 74, 78, 83, 96, 100, 104, 108, 112, 116, 120, 124, 130, 134, 138, 140, 146, 150, 154, 158, 162, 166, 168
    angletol = 1
  sel2: Explicit "Inner Skin" on boundaries 7, 11, 15, 19, 23, 27, 34, 38, 42, 44, 48, 52, 58, 60, 64, 68, 72, 76, 81, 98, 102, 106, 110, 114, 118, 122, 126, 128, 132, 136, 142, 144, 148, 152, 156, 160, 164
    angletol = 1
  sel4: Explicit "tube" on no domains
  sel5: Explicit "electrode0" on no domains
  sel6: Explicit "resistive_element0" on no domains

Couplings
  genext1: GeneralExtrusion on selection sel1 | dstmap = {x, y}; usesrcmap = on; srcmap = {x, y}; method = closest

Geometry
  geom1 "Geometry 1" (2D, length unit m)
    pol1: Polygon "Inner Skin"
      source = file
      filename = C:\Users\Aaron\Documents\Fish\Cad Geometry\Coordinates\Inner\0_clean.csv
    pol2: Polygon "Outer Skin"
      source = file
      filename = C:\Users\Aaron\Documents\Fish\Cad Geometry\Coordinates\Outer\0_clean.csv
    pol3: Polygon "EO"
      type = closed
      source = file
      filename = C:\Users\Aaron\Documents\Fish\Cad Geometry\Coordinates\EO\0_clean.csv
    fil1: Fillet | point = pol2(1) points 1-35; pol1(1) points 1-35; pol3(1) points 2-4; radius = 2[mm]
    sq1: Square "Tank" | pos = {-tank_size/2, -tank_size/2}; size = tank_size
    c1: Circle "Ground" | pos = {-20[cm], 20[cm]}; r = 250[um]
    r1: Rectangle | pos = {0.0486-2.5[cm], -1.25E-4}; size = {2.5[cm], 2*1.25E-4}
    mir1: Mirror | input = c1; keep = on; axis = {0, 1}
    fil2: Fillet | point = fil1(2) points 71-73; radius = 0.05[mm]
    fil3: Fillet | point = fil1(1) points 71-73; radius = 0.14[mm]
    fin: Finalize "Form Union"
    ige1: IgnoreEdges | input = fin(1) boundaries 59

Materials
  mat1: Common "PMMA - Poly methyl methacrylate" on selection sel4
    def "Basic"
      thermalexpansioncoefficient = 70e-6[1/K]
      heatcapacity = 1420[J/(kg*K)]
      relpermittivity = 3.0
      density = 1190[kg/m^3]
      thermalconductivity = 0.19[W/(m*K)]
      electricconductivity = 1E-19
    Enu "Young's modulus and Poisson's ratio"
      youngsmodulus = 3e9[Pa]
      poissonsratio = 0.40
  mat2: Common "Copper" on selection sel5
    def "Basic"
      relpermeability = 1
      electricconductivity = 5.998e5[S/m]
      heatcapacity = 385[J/(kg*K)]
      relpermittivity = 1
      emissivity = 0.5
      density = 8700[kg/m^3]
      thermalconductivity = 400[W/(m*K)]
    linzRes "Linearized resistivity"
      rho0 = 1.72e-8[ohm*m]
      alpha = 3.9e-3[1/K]
      Tref = 273.15[K]
  mat3: Common "Graphite" on selection sel5
    def "Basic"
      relpermeability = 1
      electricconductivity = 3e3[S/m]
      heatcapacity = 710[J/(kg*K)]
      relpermittivity = 1
      emissivity = 1
      density = 1950[kg/m^3]
      thermalconductivity = 150[W/(m*K)]*(300[K]/T)

Physics
  ec2: ConductiveMedia "Control" on all domains
    dependent variable V2
    cucn1: CurrentConservation (default) | sigma_mat = userdef; sigma = water_cond; materialType = solid
    ein1: ElectricInsulation (default)
    init1: init "Initial Values 1" (default)
    cucn3: CurrentConservation "Ground" on domains 5, 6
      sigma_mat = userdef
      sigma = gnd_cond
      materialType = solid
      minput_strainreferencetemperature = 0
    cucn4: CurrentConservation "Body" on domains 3
      sigma_mat = userdef
      sigma = body_cond
      materialType = solid
      minput_strainreferencetemperature = 0
    cucn6: CurrentConservation "EO" on domains 4
      sigma_mat = userdef
      sigma = organ_cond
      materialType = solid
      minput_strainreferencetemperature = 0
    cucn7: CurrentConservation "Skin" on domains 2
      sigma_mat = userdef
      sigma = cond
      materialType = solid
      minput_strainreferencetemperature = 0
    gnd1: Ground on boundaries 85-92
    bcs1: BoundaryCurrentSource "Boundary Current Source Top 1" on boundaries 30 | Qjs = current(x,eod_frac)
    bcs4: BoundaryCurrentSource "Boundary Current Source Bottom 1" on boundaries 29 | Qjs = current(x,eod_frac)

Mesh
  mesh1 "Mesh 1" (physics-controlled)

Studies
  std1 "Study 1"
    stat: Stationary

Solver configurations
  sol1 "Solution 1" (study std1)
    v1: Variables "Dependent Variables 1"
    s1: Stationary "Stationary Solver 1"
      dDef: Direct
      fc1: FullyCoupled

Datasets
  dset1: Solution | solution = sol1

Plots
  pg1: PlotGroup2D "Electric Potential (ec2)" | data = dset1
    surf1: Surface | expr = V2

Exports
  data1: Data
    data = dset1
    expr = V2
    unit = V
    descr = Electric potential
    filename = /home/jlewislabo/Documents/pyFishFem/tests/data/fish.txt
    location = grid
    gridx2 = range(-30[cm],0.5[cm],30[cm])
    gridy2 = range(-30[cm],0.5[cm],30[cm])