// COMSOL Multiphysics 5.4.0.346 model "fish_eig.mph"
// 2 fish
// Outline of the model tree

Parameters
  head_distance = 0.6*fish_length
  tail_distance = 0.9*fish_length
  tank_size = 70[cm]
  fish_length = 0.26[m]
  organ_offset = 19[cm]
  head_cond = 0.00025
  tail_cond = 0.0025
  EOD_phase = 0.24

Functions
  step1: Step | from = -1; smooth = 0.00001; ncontder = 1
  int1: Interpolation "EOD" | importedname = fish_matrix.csv; funcs = {current, 1}; source = file; filename = C:\Users\jlewislabo\Desktop\fish_matrix.csv; nargs = 2; argunit = m,1; fununit = A/m^2

Variables
  var2 "Variables 2"
    body_cond = 0.35582
    middle_cond = head_cond+((tail_cond-head_cond)/(tail_distance-head_distance))*(x-head_distance)
    gnd_cond = 7.27e4
    ref_cond = 3.333e-4
    water_cond = 0.023
    organ_cond = 0.92717
    cond = ((x<head_distance)*head_cond)+((x>head_distance&&x<tail_distance)*middle_cond)+((x>tail_distance)*tail_cond)

Geometry
  geom1 "Geometry 1" (2D, length unit m)
    sq1: Square "Tank" | base = center; size = 70[cm]
    c1: Circle "Ground" | pos = {-20[cm], 20[cm]}; r = 250[um]
    ic1: InterpolationCurve "body"
      type = solid
      table = 
        {0, 0}
        {0.001351633, 0.002739151}
        {0.003168164, 0.003659378}
        {0.005895353, 0.004584389}
        {0.011802668, 0.006892134}
        {0.015895844, 0.007824322}
        {0.018627817, 0.007838676}
        {0.020453918, 0.006937587}
        {0.021822297, 0.006489435}
        {0.025464928, 0.006508574}
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      starttang = {1, 0}
      endtang = {1, 0}
    ic2: InterpolationCurve "skin"
      type = solid
      table = 
        {-0.0001, 0}
        {0.001289706, 0.002817769}
        {0.003134246, 0.003753601}
        {0.005847813, 0.004673021}
        {0.011781911, 0.006990243}
        {0.015895841, 0.007926133}
        {0.018627815, 0.007942906}
        {0.020507939, 0.007021968}
        {0.021822297, 0.00659007}
        {0.025464929, 0.006608628}
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      starttang = {1, 0}
      endtang = {1, 0}
    r1: Rectangle "organ" | pos = {3[cm], -0.02[cm]/4}; size = {22[cm], 0.02[cm]/2}
    mir1: Mirror | input = c1; keep = on; axis = {0, 1}
    fin: Finalize "Form Union"

Physics
  ec: ConductiveMedia "Fish" on all domains
    dependent variable V
    ShapeProperty.frame = material
    MeshControl.EnableMeshControl = 0
    cucn1: CurrentConservation "Water" (default)
      sigma_mat = userdef
      sigma = water_cond
      materialType = solid
      minput_strainreferencetemperature = 0
    ein1: ElectricInsulation (default)
    init1: init "Initial Values 1" (default)
    cucn2: CurrentConservation "Ground" on domains 4, 5
      sigma_mat = userdef
      sigma = gnd_cond
      materialType = solid
      minput_strainreferencetemperature = 0
    cucn4: CurrentConservation "Body" on domains 2
      sigma_mat = userdef
      sigma = body_cond
      materialType = solid
      minput_strainreferencetemperature = 0
    cucn6: CurrentConservation "EO" on domains 3
      sigma_mat = userdef
      sigma = organ_cond
      materialType = solid
      minput_strainreferencetemperature = 0
    cucn7: CurrentConservation "Skin" on domains 6
      sigma_mat = userdef
      sigma = cond
      materialType = solid
      minput_strainreferencetemperature = 0
    gnd1: Ground on boundaries 9-16
    bcs1: BoundaryCurrentSource "Current" on boundaries 5, 6 | Qjs = current(x,EOD_phase)

Mesh
  mesh1 "Mesh 1"
    size: MeshSizeDefault | hmax = 0.0469; hmin = 2.1E-4; hcurve = 0.3; hgrad = 1.3
    ftri7: FreeTri "Free Triangular 7" on domains 3
    ref1: Refine on domains 3
    ftri5: FreeTri "Free Triangular 5" on remaining entities
      size1: Size on entire geometry

Studies
  std2 "Study"
    stat: Stationary | discretization = {ec, physics}

Solver configurations
  sol1 "Solution 1" (study std2)
    v1: Variables "Dependent Variables 1"
    s1: Stationary "Stationary Solver 1"
      dDef: Direct
      fc1: FullyCoupled

Datasets
  dset1: Solution | solution = sol1

Plots
  pg1: PlotGroup2D "Electric Potential (ec)" | data = dset1
    surf1: Surface | expr = V

Exports
  data1: Data
    data = dset1
    expr = V
    unit = V
    descr = Electric potential
    filename = /home/jlewislabo/Documents/tempFishFEM/tests/data/fish_eig.txt
    location = grid
    gridx2 = range(-30[cm],0.5[cm],30[cm])
    gridy2 = range(-30[cm],0.5[cm],30[cm])