// COMSOL Multiphysics 5.4.0.346 model "multi_geometry.mph"
// Outline of the model tree

Geometry
  geom1 "Geometry 1" (2D, length unit m)
    sq1: Square | base = center
    c1: Circle | pos = {-0.4, 0.2}; r = 0.02
    c2: Circle | pos = {0, -0.2}; r = 0.1
    c3: Circle | pos = {0, -0.2}; r = 0.1
    c4: Circle | pos = {0.2, 0.3}; r = 0.05
    fin: Finalize "Form Union"

Physics
  ec: ConductiveMedia "Electric Currents" on all domains
    dependent variable V
    cucn1: CurrentConservation (default) | sigma_mat = userdef; sigma = 1
    ein1: ElectricInsulation (default)
    init1: init "Initial Values 1" (default)
    cucn2: CurrentConservation on domains 2 | sigma_mat = userdef; sigma = 2
    cucn3: CurrentConservation on domains 3 | sigma_mat = userdef; sigma = 3
    cucn4: CurrentConservation on domains 4 | sigma_mat = userdef; sigma = 4
    gnd2: Ground on boundaries 5-8
    bcs2: BoundaryCurrentSource on boundaries 9-12 | Qjs = 1
    bcs3: BoundaryCurrentSource on boundaries 13-16 | Qjs = -2

Mesh
  mesh1 "Mesh 1" (physics-controlled)

Studies
  std1 "Study 1"
    stat: Stationary

Solver configurations
  sol1 "Solution 1" (study std1)
    v1: Variables "Dependent Variables 1"
    s1: Stationary "Stationary Solver 1"
      dDef: Direct
      fc1: FullyCoupled | linsolver = dDef

Datasets
  dset1: Solution | solution = sol1
  cln1: CutLine2D | data = dset1; genpoints = {{0.1, 0}, {1, 0}}

Plots
  pg1: PlotGroup2D "Electric Potential (ec)" | data = dset1
    surf1: Surface | expr = V

Exports
  plot1: Plot | filename = /home/jlewislabo/Documents/pyFishFem/tests/multi_geometry.txt
  data1: Data | data = dset1; expr = V; filename = /home/jlewislabo/Documents/pyFishFem/tests/data/multi_geometry.txt